f1(n) := (((1 + sqrt(5))/2)^n - ((1 - sqrt(5))/2)^n)/sqrt(5)
f2(n) := (((1 + sqrt(5))/2)^(n + 1) - ((1 - sqrt(5))/2)^(n + 1))/sqrt(5)
f3(n) := (((1 + sqrt(5))/2)^(n - 1) - ((1 - sqrt(5))/2)^(n - 1))/sqrt(5)
n := 12
sumgreen := f1(n)*3245 + f2(n)*235555
f1(n) = 144
sumred := f1(n) + f3(n)
sumgreen = 55351595
sumred = 233
